*Heading
 Cantilever beam analysis
** Job name: CantileverBeam Model name: CantileverBeam
** Generated by: Abaqus/CAE Learning Edition 2025
*Preprint, echo=NO, model=NO, history=NO, contact=NO
**
** PARTS
**
*Part, name=Beam
*Node
      1,         100.,          10.,          10.
      2,         100.,           5.,          10.
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*Element, type=C3D8R
 1,  10,  11,  14,  13,   1,   2,   5,   4
 2,  11,  12,  15,  14,   2,   3,   6,   5
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*Nset, nset=AllCells, generate
   1,  189,    1
*Elset, elset=AllCells, generate
  1,  80,   1
** Section: BeamSection
*Solid Section, elset=AllCells, material=Steel
,
*End Part
**
**
** ASSEMBLY
**
*Assembly, name=Assembly
**
*Instance, name=Beam-1, part=Beam
*End Instance
**
*Nset, nset=FixedEnd, instance=Beam-1, generate
 181,  189,    1
*Elset, elset=FixedEnd, instance=Beam-1, generate
 77,  80,   1
*Elset, elset=_LoadSurface_S2, internal, instance=Beam-1, generate
 1,  4,  1
*Surface, type=ELEMENT, name=LoadSurface
_LoadSurface_S2, S2
*End Assembly
**
** MATERIALS
**
*Material, name=Steel
*Density
 7.85e-09,
*Elastic
210000., 0.3
**
** BOUNDARY CONDITIONS
**
** Name: FixedSupport Type: Symmetry/Antisymmetry/Encastre
*Boundary
FixedEnd, ENCASTRE
** ----------------------------------------------------------------
**
** STEP: LoadStep
**
*Step, name=LoadStep, nlgeom=NO
*Static
0.1, 1., 1e-06, 1.
**
** LOADS
**
** Name: AppliedForce   Type: Surface traction
*Dsload
LoadSurface, TRVEC, -10., 0., 1., 0.
**
** OUTPUT REQUESTS
**
*Restart, write, frequency=0
**
** FIELD OUTPUT: F-Output-1
**
*Output, field
*Node Output, variable=PRESELECT
*Element Output, directions=YES
E, S
**
** HISTORY OUTPUT: H-Output-1
**
*Output, history, variable=PRESELECT
*End Step
