*Heading
 Simple cube compression analysis
** Job name: CubeAnalysis Model name: CubeModel
** Generated by: Abaqus/CAE Learning Edition 2025
*Preprint, echo=NO, model=NO, history=NO, contact=NO
**
** PARTS
**
*Part, name=Cube
*Node
      1,          10.,          10.,          10.
      2,          10.,          7.5,          10.
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*Element, type=C3D8R
 1,  26,  27,  32,  31,   1,   2,   7,   6
 2,  27,  28,  33,  32,   2,   3,   8,   7
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*Nset, nset=AllCells, generate
   1,  125,    1
*Elset, elset=AllCells, generate
  1,  64,   1
** Section: SolidSection
*Solid Section, elset=AllCells, material=Steel
,
*End Part
**
**
** ASSEMBLY
**
*Assembly, name=Assembly
**
*Instance, name=Cube-1, part=Cube
*End Instance
**
*Nset, nset=BottomFace, instance=Cube-1
  21,  22,  23,  24,  25,  46
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*Elset, elset=BottomFace, instance=Cube-1
 13, 14, 15, 16, 29, 30, 31, 32, 45, 46, 47, 48, 61, 62, 63, 64
*Elset, elset=_TopSurface_S3, internal, instance=Cube-1
  1,  2,  3,  4, 17, 18, 19, 20, 33, 34, 35, 36, 49, 50, 51, 52
*Surface, type=ELEMENT, name=TopSurface
_TopSurface_S3, S3
*End Assembly
**
** MATERIALS
**
*Material, name=Steel
*Density
 7.85e-09,
*Elastic
210000., 0.3
**
** BOUNDARY CONDITIONS
**
** Name: FixBottom Type: Symmetry/Antisymmetry/Encastre
*Boundary
BottomFace, ENCASTRE
** ----------------------------------------------------------------
**
** STEP: LoadStep
**
*Step, name=LoadStep, nlgeom=NO
*Static
0.1, 1., 1e-06, 1.
**
** LOADS
**
** Name: TopPressure   Type: Pressure
*Dsload
TopSurface, P, 100.
**
** OUTPUT REQUESTS
**
*Restart, write, frequency=0
**
** FIELD OUTPUT: F-Output-1
**
*Output, field
*Node Output
RF, U
*Element Output, directions=YES
S,
**
** HISTORY OUTPUT: H-Output-1
**
*Output, history, variable=PRESELECT
*End Step
