*Heading
 Experiment 4: PlasticityTest - 100kN vertical load (plasticity)
** Job name: Experiment4_Job3 Model name: Experiment4_TO_Specimen
** Generated by: Abaqus/CAE Learning Edition 2025
*Preprint, echo=NO, model=NO, history=NO, contact=NO
**
** PARTS
**
*Part, name=TO_Specimen
*Node
      1,           5.,   106.169998,          25.
      2,   32.2999992,          28.,          25.
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*Element, type=C3D4
   1, 456, 477, 468, 458
   2, 477, 478, 479, 257
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*Nset, nset=AllCells, generate
   1,  569,    1
*Elset, elset=AllCells, generate
    1,  1775,     1
** Section: IN718_Section
*Solid Section, elset=AllCells, material=IN718
,
*End Part
**
**
** ASSEMBLY
**
*Assembly, name=Assembly
**
*Instance, name=TO_Specimen-1, part=TO_Specimen
*End Instance
**
*Node
      1,           0.,   132.169998,         12.5
*Node
      2,  -23.2999992,          14.,         12.5
*Node
      3,   23.2999992,          14.,         12.5
*Node
      4,           0.,   132.169998,         12.5
*Nset, nset=LowerLeftPinHole, instance=TO_Specimen-1
  31,  32, 173, 174, 175, 176
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*Elset, elset=LowerLeftPinHole, instance=TO_Specimen-1
  203,  209,  253,  334,  382,  491
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*Nset, nset=LowerRightPinHole, instance=TO_Specimen-1
  33,  34, 187, 188, 189, 190
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*Elset, elset=LowerRightPinHole, instance=TO_Specimen-1
   98,  188,  207,  316,  530,  615
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*Nset, nset=UpperPinHole, instance=TO_Specimen-1
  29,  30, 159, 160, 161, 162
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*Elset, elset=UpperPinHole, instance=TO_Specimen-1
    3,   80,  226,  289,  374,  435
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*Nset, nset=UpperRP
 4,
*Elset, elset=_LeftBlockBottom_S3, internal, instance=TO_Specimen-1
  384,  630, 1119, 1156, 1286, 1478, 1482, 1757, 1765
*Elset, elset=_LeftBlockBottom_S4, internal, instance=TO_Specimen-1
 1083, 1187
*Elset, elset=_LeftBlockBottom_S1, internal, instance=TO_Specimen-1
 1601,
*Surface, type=ELEMENT, name=LeftBlockBottom
_LeftBlockBottom_S3, S3
_LeftBlockBottom_S4, S4
_LeftBlockBottom_S1, S1
*Elset, elset=_RightBlockBottom_S3, internal, instance=TO_Specimen-1
  288,  320,  616,  749,  938,  976,  989, 1023, 1205, 1208, 1769
*Elset, elset=_RightBlockBottom_S1, internal, instance=TO_Specimen-1
 1412,
*Surface, type=ELEMENT, name=RightBlockBottom
_RightBlockBottom_S3, S3
_RightBlockBottom_S1, S1
*Elset, elset=_UpperPinSurface_S4, internal, instance=TO_Specimen-1
    3,   80,  226,  629,  680,  701
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*Elset, elset=_UpperPinSurface_S3, internal, instance=TO_Specimen-1
  289,  374,  435,  452,  620,  626
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*Elset, elset=_UpperPinSurface_S2, internal, instance=TO_Specimen-1
  690, 1203, 1209, 1226, 1231, 1249, 1265, 1292
*Elset, elset=_UpperPinSurface_S1, internal, instance=TO_Specimen-1
  816,  901, 1130, 1179, 1193, 1194, 1201, 1221, 1222, 1244, 1323, 1333, 1341, 1359
*Surface, type=ELEMENT, name=UpperPinSurface
_UpperPinSurface_S4, S4
_UpperPinSurface_S3, S3
_UpperPinSurface_S2, S2
_UpperPinSurface_S1, S1
** Constraint: UpperPinCoupling
*Coupling, constraint name=UpperPinCoupling, ref node=UpperRP, surface=UpperPinSurface
*Kinematic
*End Assembly
**
** MATERIALS
**
*Material, name=IN718
*Density
 8.19e-09,
*Elastic
198400., 0.3
*Plastic
 980.,     0.
1000.,  5e-05
1050., 0.0005
1100., 0.0015
1150., 0.0035
1191.,  0.006
1250.,  0.012
1300.,   0.02
1350.,   0.03
1400.,  0.045
**
** BOUNDARY CONDITIONS
**
** Name: LowerLeftPin_BC Type: Displacement/Rotation
*Boundary
LowerLeftPinHole, 2, 2
LowerLeftPinHole, 3, 3
** Name: LowerRightPin_BC Type: Displacement/Rotation
*Boundary
LowerRightPinHole, 2, 2
LowerRightPinHole, 3, 3
** ----------------------------------------------------------------
**
** STEP: FatigueTest
**
*Step, name=FatigueTest, nlgeom=YES
*Static
0.1, 1., 1e-08, 1.
**
** LOADS
**
** Name: VerticalLoad_20kN   Type: Concentrated force
*Cload
UpperRP, 2, 20000.
**
** OUTPUT REQUESTS
**
*Restart, write, frequency=0
**
** FIELD OUTPUT: F-Output-1
**
*Output, field, variable=PRESELECT
**
** HISTORY OUTPUT: H-Output-1
**
*Output, history, variable=PRESELECT
*End Step
** ----------------------------------------------------------------
**
** STEP: TODesign
**
*Step, name=TODesign, nlgeom=YES
*Static
0.1, 1., 1e-08, 1.
**
** OUTPUT REQUESTS
**
*Restart, write, frequency=0
**
** FIELD OUTPUT: F-Output-1
**
*Output, field, variable=PRESELECT
**
** HISTORY OUTPUT: H-Output-1
**
*Output, history, variable=PRESELECT
*End Step
** ----------------------------------------------------------------
**
** STEP: PlasticityTest
**
*Step, name=PlasticityTest, nlgeom=YES, inc=200
*Static
0.05, 1., 1e-10, 0.1
**
** LOADS
**
** Name: VerticalLoad_20kN   Type: Concentrated force
*Cload
UpperRP, 2, 100000.
**
** OUTPUT REQUESTS
**
*Restart, write, frequency=0
**
** FIELD OUTPUT: F-Output-1
**
*Output, field, variable=PRESELECT
**
** HISTORY OUTPUT: H-Output-1
**
*Output, history, variable=PRESELECT
*End Step
