*Heading
** Job name: Experiment5_FEA Model name: Experiment5_TO
** Generated by: Abaqus/CAE 2025
*Preprint, echo=NO, model=NO, history=NO, contact=NO
**
** PARTS
**
*Part, name=TO_Specimen
*Node
      1,  -14.3000002,           0.,          25.
      2,  -32.2999992,           0.,          25.
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*Element, type=C3D4
   1, 2643,   49,  822,  817
   2, 2643, 2644, 2645,  817
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*Elset, elset=_TO_Specimen-1_ALL_ELEMENTS, internal, generate
     1,  20527,      1
*Nset, nset=FrozenUpperPin
   11,   12,   13,   14,   27,   28
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*Elset, elset=FrozenUpperPin, generate
 15108,  17841,      1
*Nset, nset=FrozenLowerLeftPin
    1,    2,    3,    4,    5,    6
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*Elset, elset=FrozenLowerLeftPin, generate
    1,  2641,     1
*Nset, nset=FrozenLowerRightPin
   17,   18,   19,   20,   33,   34
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*Elset, elset=FrozenLowerRightPin, generate
 17842,  20527,      1
*Nset, nset=DesignSpace
    5,    6,    7,    8,   11,   12
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*Elset, elset=DesignSpace, generate
  2642,  15107,      1
*Nset, nset=AllCells, generate
    1,  4752,     1
*Elset, elset=AllCells, generate
     1,  20527,      1
** Section: SolidSection
*Solid Section, elset=AllCells, material=IN718
,
*End Part
**
**
** ASSEMBLY
**
*Assembly, name=Assembly
**
*Instance, name=TO_Specimen-1, part=TO_Specimen
*End Instance
**
*Node
      1,           0.,   132.169998,         12.5
*Nset, nset=FreezeLowerLeft, instance=TO_Specimen-1
    1,    2,    3,    4,    5,    6
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*Elset, elset=FreezeLowerLeft, instance=TO_Specimen-1, generate
    1,  2641,     1
*Nset, nset=FreezeLowerRight, instance=TO_Specimen-1
   17,   18,   19,   20,   33,   34
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*Elset, elset=FreezeLowerRight, instance=TO_Specimen-1, generate
 17842,  20527,      1
*Nset, nset=FreezeUpperPin, instance=TO_Specimen-1
   11,   12,   13,   14,   27,   28
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*Elset, elset=FreezeUpperPin, instance=TO_Specimen-1, generate
 15108,  17841,      1
*Nset, nset=LowerLeftPinHole, instance=TO_Specimen-1
   9,  10, 119, 120, 121, 122
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*Elset, elset=LowerLeftPinHole, instance=TO_Specimen-1
   42,  207,  288,  289,  302,  400
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*Nset, nset=LowerRightPinHole, instance=TO_Specimen-1
   33,   34,  519,  520,  521,  522
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*Elset, elset=LowerRightPinHole, instance=TO_Specimen-1
 17869, 18006, 18025, 18174, 18204, 18258
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*Nset, nset=UpperPinHole, instance=TO_Specimen-1
   31,   32,  463,  464,  465,  466
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*Elset, elset=UpperPinHole, instance=TO_Specimen-1
 15222, 15336, 15560, 15566, 15736, 15753
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*Nset, nset=UpperRP
 1,
*Elset, elset=_UpperPinSurface_S2, internal, instance=TO_Specimen-1
 15222, 16458, 17013, 17136, 17251, 17267, 17278, 17478, 17575, 17636, 17802
*Elset, elset=_UpperPinSurface_S3, internal, instance=TO_Specimen-1
 15336, 15566, 15736, 15775, 16160, 16200
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*Elset, elset=_UpperPinSurface_S1, internal, instance=TO_Specimen-1
 15560, 15753, 16308, 16996, 17087, 17129, 17228, 17464, 17519, 17646
*Elset, elset=_UpperPinSurface_S4, internal, instance=TO_Specimen-1
 17140, 17284, 17288, 17667, 17774
*Surface, type=ELEMENT, name=UpperPinSurface
_UpperPinSurface_S2, S2
_UpperPinSurface_S3, S3
_UpperPinSurface_S4, S4
_UpperPinSurface_S1, S1
** Constraint: UpperPinCoupling
*Coupling, constraint name=UpperPinCoupling, ref node=UpperRP, surface=UpperPinSurface
*Kinematic
*End Assembly
**
** MATERIALS
**
*Material, name=IN718
*Density
 8.19e-09,
*Elastic
200000., 0.3
**
** BOUNDARY CONDITIONS
**
** Name: LowerLeftPin_BC Type: Displacement/Rotation
*Boundary
LowerLeftPinHole, 2, 2
LowerLeftPinHole, 3, 3
** Name: LowerRightPin_BC Type: Displacement/Rotation
*Boundary
LowerRightPinHole, 2, 2
LowerRightPinHole, 3, 3
** ----------------------------------------------------------------
**
** STEP: LoadStep
**
*Step, name=LoadStep, nlgeom=NO
*Static
1., 1., 1e-06, 1.
**
** LOADS
**
** Name: VerticalLoad_20kN   Type: Concentrated force
*Cload
UpperRP, 2, 20000.
**
** OUTPUT REQUESTS
**
*Restart, write, frequency=0
**
** FIELD OUTPUT: F-Output-1
**
*Output, field
*Node Output
RF, U
*Element Output, directions=YES
ENER, S
**
** HISTORY OUTPUT: H-Output-1
**
*Output, history, variable=PRESELECT
*End Step
