*Heading
** Job name: airbeam_FEA Model name: airbeam
** Generated by: Abaqus/CAE 2025
*Preprint, echo=NO, model=NO, history=NO, contact=NO
**
** PARTS
**
*Part, name=PART-1
*Node
      1,           0.,           0.
      2,  0.798165977,           0.
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*Element, type=CPE4
   1,    1,    2,  112,  111
   2,    2,    3,  113,  112
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*Elset, elset=DESIGN_ELEM
  110,  111,  112,  113,  114,  115
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*Elset, elset=P1
    1,    2,    3,    4,    5,    6
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** Section: Section-1-P1
*Solid Section, elset=P1, material=MAT11
1.,
** Section: Section-2-DESIGN_ELEM
*Solid Section, elset=DESIGN_ELEM, material=MAT11
1.,
*End Part
**
**
** ASSEMBLY
**
*Assembly, name=Assembly
**
*Instance, name=PART-1-1, part=PART-1
*End Instance
**
*Nset, nset=FORCE1, instance=PART-1-1
 109, 110
*Elset, elset=FROZEN_ELEMENTS, instance=PART-1-1
    1,    2,    3,    4,    5,    6
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*Nset, nset=SPC11, instance=PART-1-1
 3961,
*Nset, nset=SPC13, instance=PART-1-1, generate
    1,  3851,   110
*End Assembly
**
** MATERIALS
**
**  mat11
**
*Material, name=MAT11
*Elastic
210000., 0.3
** ----------------------------------------------------------------
**
** STEP: Step-1
**
*Step, name=Step-1, nlgeom=NO, perturbation
*Static
**
** BOUNDARY CONDITIONS
**
** Name: Disp-BC-1 Type: Displacement/Rotation
*Boundary
SPC11, 1, 1
** Name: Disp-BC-2 Type: Displacement/Rotation
*Boundary
SPC11, 2, 2
** Name: Disp-BC-3 Type: Displacement/Rotation
*Boundary
SPC13, 1, 1
**
** LOADS
**
** Name: CFORCE-1   Type: Concentrated force
*Cload
FORCE1, 2, 39.9089
**
** OUTPUT REQUESTS
**
**
** FIELD OUTPUT: F-Output-1
**
*Output, field, variable=PRESELECT
**
** HISTORY OUTPUT: H-Output-1
**
*Output, history, variable=PRESELECT
*End Step
