*Heading
** Job name: Block_Fallback Model name: Model-1
** Generated by: Abaqus/CAE 2025
*Preprint, echo=NO, model=NO, history=NO, contact=NO
**
** PARTS
**
*Part, name=Block
*Node
      1,         100.,          40.,          20.
      2,         100.,          35.,          20.
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*Element, type=C3D8R
  1,  46,  47,  56,  55,   1,   2,  11,  10
  2,  47,  48,  57,  56,   2,   3,  12,  11
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*Nset, nset=AllCells, generate
   1,  945,    1
*Elset, elset=AllCells, generate
   1,  640,    1
*Nset, nset=FixedFace, generate
 901,  945,    1
*Elset, elset=FixedFace, generate
 609,  640,    1
*Elset, elset=FrozenElems, generate
 609,  640,    1
*Elset, elset=_LoadSurface_S2, internal, generate
  1,  32,   1
*Surface, type=ELEMENT, name=LoadSurface
_LoadSurface_S2, S2
** Section: Section
*Solid Section, elset=AllCells, material=Steel
,
*End Part
**
**
** ASSEMBLY
**
*Assembly, name=Assembly
**
*Instance, name=Block-1, part=Block
*End Instance
**
*End Assembly
**
** MATERIALS
**
*Material, name=Steel
*Density
 7.85e-09,
*Elastic
210000., 0.3
**
** BOUNDARY CONDITIONS
**
** Name: Fixed Type: Symmetry/Antisymmetry/Encastre
*Boundary
Block-1.FixedFace, ENCASTRE
** ----------------------------------------------------------------
**
** STEP: LoadStep
**
*Step, name=LoadStep, nlgeom=NO
*Static
1., 1., 1e-06, 1.
**
** LOADS
**
** Name: Load   Type: Pressure
*Dsload
Block-1.LoadSurface, P, 1.
**
** OUTPUT REQUESTS
**
*Restart, write, frequency=0
**
** FIELD OUTPUT: F-Output-1
**
*Output, field
*Node Output
RF, U
*Element Output, directions=YES
E, ENER, S
**
** HISTORY OUTPUT: H-Output-1
**
*Output, history, variable=PRESELECT
*End Step
